# SPH example
# counter-flowing Poiseuille flow
echo            both
units		si
variable       ndim  equal 2
# domain size
variable        Npx  equal 30
variable        xsize equal 2e-3
variable        ysize equal 1e-3
variable        Npart equal round(${Npx}*${ysize}/${xsize}*${Npx})
if "${ndim}==3" then "variable        zsize equal 1e-8"
# temperature


# interaction parameters
variable        dh equal ${xsize}/${Npx}
variable        EPS equal 0.1*${dh}
variable        cutoff equal 3.0*${dh}

# body force (units of acceleration)
variable gy equal 1e-4
#variable gy equal 0.0

variable        mu equal 1e-6
variable        csound equal 1e-2
variable        rho_sph equal 1e3
variable        rho0 equal 1e3
variable        gamma equal 7.0

# number of timesteps
variable ntime equal 50000
timestep	1e-4

dimension       ${ndim}
atom_style	mfsph
communicate	single vel yes

# lattice parameter

if "${ndim}==3" then "lattice sc      ${dh} origin 0.5 0.5 0.5" else &
    "lattice sq  ${dh} origin 0.5 0.5 0.0"

if "${ndim}==3" then "region		box block 0 ${xsize} 0 ${ysize} 0 ${zsize} units box" else &
    "region		box block 0 ${xsize} 0 ${ysize} -${EPS} ${EPS} units box"
create_box	1 box
#create_atoms	1 box
create_atoms    1 random ${Npart} 123456 box

variable        dh equal ${xsize}/${Npx}
variable        m equal ${rho_sph}*${dh}^${ndim}
mass		1 ${m}
print           "mass: ${m}"
pair_style	mfsph ${cutoff}
pair_coeff	1 1 ${mu} ${csound} ${rho0} ${gamma}

neighbor	1e-5 bin
neigh_modify    delay 0 every 1

fix		1 all nve

variable        Nfreq   equal  ${ntime}
variable        Nrepeat equal  round(0.9*${ntime})
fix av_vy all ave/spatial 1 ${Nrepeat} ${Nfreq} x center 0.2 vy file "vy.av"
fix av_rho all ave/spatial 1 ${Nrepeat} ${Nfreq} x center 0.5 density/number file "rho.av"

# simulation temperature (do not use vy, flow goes in this direction)
variable simtemp atom mass*vx^2
fix av_temp all ave/spatial 1 ${Nrepeat} ${Nfreq} x lower 0.5 v_simtemp file "simtemp.av"

dump mdump all custom 1000 dump.dpd.* id type x y vx vy sph_rho
dump_modify mdump sort id

#dump myDump all image 1000 nb.*.ppm type type view 0 0
#run 0

variable fy atom mass*${gy}*((x>${xsize}/2.0)-(x<${xsize}/2.0))
fix reverce_periodic all addforce 0.0 v_fy 0.0

run		${ntime} every 1000 "velocity all zero linear"
