echo               both

include            in.vars
dimension          ${ndim}
units              si
atom_modify        map array sort 0 0
atom_style         hybrid meso bond
comm_modify        vel yes

read_data          data.polymer

# Swimmer definitions: bonds
# harmonic/swimmer requires a custom version of lammps
bond_style harmonic/swimmer

special_bonds 	lj 1 0 0
#bond_coeff	1 ${H_fene} ${r0_fene} 0 0 ${dx}
variable        A equal 0.5*${dx}
variable        omega equal 1.0
variable        phi equal 0.0
variable        vel_sw equal 5.0
variable        n1     equal 1
variable        n2     equal 4
bond_coeff	1 ${H_fene} ${dx} ${r0_fene} ${A} ${omega} ${phi} ${vel_sw} ${n1} ${n2}

variable        Natoms equal count(all)
if ${ndim}==2 then "variable        domain_volume equal ${Lx}*${Ly}"
variable       sph_mass equal ${sph_rho}*${domain_volume}/${Natoms}
mass           * ${sph_mass}

pair_style         hybrid/overlay sph/rhosum 1 sph/taitwater
pair_coeff * *     sph/taitwater ${sph_rho0} ${sph_c} ${sph_eta} ${h}
pair_coeff * *     sph/rhosum ${h}

# set forces into the head and the tail of the swimmer

# do full time integration
fix                integrate_fix_full all  meso

neighbor           ${h} bin

include            settimestep.lmp
timestep           ${dt}

variable           force_sdpd_fx equal fx[1]
variable           force_sdpd_fy equal fy[1]

compute            rho_peratom all meso_rho/atom

dump               myDump all image 10 dump.*.jpg type type adiam 0.05 bond type 0.02
dump_modify        myDump pad 7

dump               d0 all custom 10 dump.sph_sw id type x y vx vy c_rho_peratom
dump_modify        d0 pad 7

run                1000

print              "f: ${force_sdpd_fx} ${force_sdpd_fy}"
