# move two atoms with DPD forces
include "in.minsetup"
communicate	single vel yes

create_atoms 1 single 5.0 5.0 5.0 units box
create_atoms 1 single 5.5 5.0 5.0 units box

variable        T equal 0.0
variable        cutoff equal 1.0
variable        gamma  equal 1.0
variable        adpd equal 1.0

pair_style	dpd ${T} ${cutoff} 928948
pair_coeff	* * ${adpd} ${gamma} 1.0

fix	        1 all nve
neighbor	5.0 bin
neigh_modify    delay 0 every 1
timestep        0.01

dump myDump all image 10 dump.*.jpg type type
# When {pad} is specified with {Nchar} > 0, the string is padded with
# leading zeroes so they are all the same length = {Nchar}.  For
# example, pad 7 would yield 0000100, 0012000, 2000000.
dump_modify myDump pad 7

run 1000
