# move two atoms with DPD, read configuration from a file
echo     both

variable    pmass index 1.0
units       si
atom_modify map array sort 0.0 0.0
communicate	single vel yes

read_data       generator.input

variable        T equal 0.0
variable        cutoff equal 1.0
variable        gamma  equal 1.0
variable        adpd equal 1.0

pair_style	dpd ${T} ${cutoff} 928948
pair_coeff	* * ${adpd} ${gamma} 1.0

fix	        1 all nve
neighbor	5.0 bin
neigh_modify    delay 0 every 1
timestep        0.0001

run 10000
variable dxpos equal x[2]-x[1]
print "dx(t=1) = ${dxpos}"
